*Heading
** Job name: Job-1 Model name: Job-12-Triangles
** Generated by: Abaqus/CAE 6.14-2
*Preprint, echo=NO, model=NO, history=NO, contact=NO
** ----------------------------------------------------------------
**
** PART INSTANCE: LEVER
**
*System
  -37.956212,     32.8184,         -5.,  -36.956212,     32.8184,         -5.
*Node
      1,   297.956207,  -32.8184013,          10.
      2,   297.956207,  -32.8184013,           0.
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*Element, type=S4R
  1,    1,   29,  895,   48
  2,   29,    2,   30,  895
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*Nset, nset=LEVER_SHELLS, generate
    1,  1320,     1
*Elset, elset=LEVER_SHELLS, generate
   1,  880,    1
*Nset, nset=LEVER_SYMM
   1,   2,   3,   4,   5,   6
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*Elset, elset=LEVER_SYMM, generate
   1,  880,    1
*Elset, elset=LEVER__HOLE-1_SPOS, generate
 41,  80,   1
*Elset, elset=LEVER__HOLE-2_SPOS, generate
  81,  164,    1
*Elset, elset=LEVER__HOLE-3_SPOS, generate
  1,  40,   1
*Elset, elset=LEVER__TIEM_SNEG, generate
   1,  880,    1
*Elset, elset=_LEVER_HOLE-1_SPOS, generate
 41,  80,   1
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

*Surface, type=ELEMENT, name=LEVER_HOLE-1
_LEVER_HOLE-1_SPOS, SPOS
*Elset, elset=_LEVER_HOLE-2_SPOS, generate
  81,  164,    1
*Surface, type=ELEMENT, name=LEVER_HOLE-2
_LEVER_HOLE-2_SPOS, SPOS
*Elset, elset=_LEVER_HOLE-3_SPOS, generate
  1,  40,   1
*Surface, type=ELEMENT, name=LEVER_HOLE-3
_LEVER_HOLE-3_SPOS, SPOS
*Elset, elset=_LEVER_TIEM_SNEG, generate
   1,  880,    1
*Surface, type=ELEMENT, name=LEVER_TIEM
_LEVER_TIEM_SNEG, SNEG
** Section: Section-2-SHELLS
*Shell Section, elset=LEVER_SHELLS, material=steel_elastic
1., 5
** ----------------------------------------------------------------
**
** PART INSTANCE: INNER
**
*System
-37.956211936725,     32.8184,         -5.,-36.956211936725,     32.8184,         -5.
*Node
   1321,   297.835327,  -34.3686409,           5.
   1322,   307.896027,  -34.3686409,           5.
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*Element, type=B31
  881,  1321,  1690
  882,  1690,  1691
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*Nset, nset=INNER_TIES
1321,1322,1324,1328,1333,1335
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*Nset, nset=INNER_DESIGN, generate
  1321,  46524,      1
*Elset, elset=INNER_DESIGN, generate
   881,  46345,      1
** Section: Section-1-DESIGN  Profile: Profile-1
*Beam Section, elset=INNER_DESIGN, material=steel_elastic, temperature=GRADIENTS, section=CIRC
0.5
0.,0.,-1.
*System
*Node
  46525,  -141.421356,  -141.421356,           0.
  46526,  1.51273298e-07,  4.8526897e-07,           0.
  46527,         250.,  4.85269027e-07,           0.
*Nset, nset=RP-1
46525,
*Nset, nset=RP-2
46526,
*Nset, nset=RP-3
46527,
*Nset, nset=INNER_TIES_CNS_
1321,1322,1324,1328,1333,1335
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*Nset, nset=INNER_TIES_CNS__CNS_
1321,1322,1324,1328,1333,1335
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*Surface, type=NODE, name=INNER_TIES_CNS__CNS__CNS_
INNER_TIES_CNS__CNS_, 1.
** Constraint: HOLE-1
*Coupling, constraint name=HOLE-1, ref node=RP-1, surface=LEVER_HOLE-1
*Kinematic
** Constraint: HOLE-2
*Coupling, constraint name=HOLE-2, ref node=RP-2, surface=LEVER_HOLE-2
*Kinematic
** Constraint: HOLE-3
*Coupling, constraint name=HOLE-3, ref node=RP-3, surface=LEVER_HOLE-3
*Kinematic
** Constraint: TIE-1-1
*Tie, name=TIE-1-1, adjust=yes
INNER_TIES_CNS__CNS__CNS_, LEVER_TIEM
**
** MATERIALS
**
**   Data from Getting Started Manual, Chap. "10.2 Plasticity in ductile metals"
**   Units mm,s,ton
*Material, name=steel_elastic
*Density
 7.85e-09,
*Elastic
210000., 0.3
** SAE1010
** Units g, mm, s
*Material, name=steel_plasti
*Density
7.85e-09,
*Elastic
 210000, 0.3
*Plastic
 200,      0.
 265, 0.00037
 304, 0.02921
 399, 0.10357
 454, 0.18782
 814,    1.34
**
** BOUNDARY CONDITIONS
**
** Name: Disp-BC-1 Type: Symmetry/Antisymmetry/Encastre
*Boundary
RP-1, ENCASTRE
** Name: Disp-BC-2 Type: Displacement/Rotation
*Boundary
RP-2, 1, 1
** Name: Disp-BC-3 Type: Displacement/Rotation
*Boundary
RP-2, 2, 2
** Name: Disp-BC-4 Type: Displacement/Rotation
*Boundary
RP-2, 3, 3
** Name: Disp-BC-5 Type: Displacement/Rotation
*Boundary
RP-2, 4, 4
** Name: Disp-BC-6 Type: Displacement/Rotation
*Boundary
RP-2, 5, 5
** Name: Disp-BC-7 Type: Symmetry/Antisymmetry/Encastre
*Boundary
INNER_DESIGN, ZSYMM
** Name: Disp-BC-8 Type: Symmetry/Antisymmetry/Encastre
*Boundary
LEVER_SYMM, ZSYMM
** ----------------------------------------------------------------
**
** STEP: Step-1
**
*Step, name=Step-1, nlgeom=YES, inc=10000
*Static
**, stabilize, allsdtol, factor=1.0E-6
0.1, 1., 1e-10, 0.1

**
** LOADS
**
** Name: Displacement Type: Displacement/Rotation
*Boundary
RP-3, 2, 2, 1.0
** Name: CFORCE-1   Type: Concentrated force
**Cload
**RP-3, 2, 1500.
**
** OUTPUT REQUESTS
**
*Restart, write, frequency=0
**
** FIELD OUTPUT: F-Output-1
**
*Output, field, variable=PRESELECT
**
** FIELD OUTPUT: FO_Buckling
**
*Output, field
*Node Output
RF, U
*Element Output, directions=YES
E, MISES, PE, PEEQ, PEMAG, S
** FIELD OUTPUT: BRADIUS
**
*Output, field
*Element Output
BRADIUS,
**
** HISTORY OUTPUT: FO_Buckling
**
*Output, history
*Node Output, nset=RP-3
RF2, U2
*End Step
